*HEADING
Tier 1 engineering candidate; not signed validation; not benchmark agreement.
Thick-walled pressure cylinder under internal pressure (Lame benchmark).
** Ri=100 Ro=150 mm, L=100 mm, p=10 MPa, SA-516 Gr.70, E=200 GPa, nu=0.3.
*NODE,NSET=NALL
       1,  0.00000000e+00,  0.00000000e+00,  0.00000000e+00
       2,  1.00000000e+02,  0.00000000e+00,  0.00000000e+00
       3,  1.50000000e+02,  0.00000000e+00,  0.00000000e+00
       4,  1.49429205e+02,  1.30733614e+01,  0.00000000e+00
       5,  9.96194698e+01,  8.71557427e+00,  0.00000000e+00
       6,  1.00000000e+02,  0.00000000e+00,  1.00000000e+02
       7,  1.50000000e+02,  0.00000000e+00,  1.00000000e+02
       8,  0.00000000e+00,  0.00000000e+00,  1.00000000e+02
       9,  1.49429205e+02,  1.30733614e+01,  1.00000000e+02
      10,  9.96194698e+01,  8.71557427e+00,  1.00000000e+02
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*ELEMENT,TYPE=C3D20,ELSET=BODY
151, 2, 11, 33, 5, 75, 110, 204, 96,
     18, 103, 41, 42, 132, 269, 256, 259, 78, 131, 249, 99
152, 75, 110, 204, 96, 76, 111, 205, 97,
     132, 269, 256, 259, 134, 270, 257, 260, 79, 133, 251, 100
153, 76, 111, 205, 97, 77, 112, 206, 98,
     134, 270, 257, 260, 136, 271, 258, 261, 80, 135, 253, 101
154, 77, 112, 206, 98, 6, 43, 65, 10,
     136, 271, 258, 261, 50, 262, 73, 74, 81, 137, 255, 102
155, 11, 12, 32, 33, 110, 113, 201, 204,
     19, 104, 40, 103, 139, 272, 250, 269, 131, 138, 242, 249
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*NSET,NSET=INNER_SURF
2, 5, 6, 10, 42, 74, 75, 76, 77, 78,
79, 80, 81, 96, 97, 98, 99, 100, 101, 102,
259, 260, 261
*NSET,NSET=OUTER_SURF
3, 4, 7, 9, 26, 58, 82, 83, 84, 85,
86, 87, 88, 89, 90, 91, 92, 93, 94, 95,
183, 184, 185
*NSET,NSET=THETA0
1, 2, 3, 6, 7, 8, 11, 12, 13, 14,
15, 16, 17, 18, 19, 20, 21, 22, 23, 24,
25, 43, 44, 45, 46, 47, 48, 49, 50, 51,
52, 53, 54, 55, 56, 57, 75, 76, 77, 78,
79, 80, 81, 82, 83, 84, 85, 86, 87, 88,
110, 111, 112, 113, 114, 115, 116, 117, 118, 119,
120, 121, 122, 123, 124, 125, 126, 127, 128, 129,
130, 131, 132, 133, 134, 135, 136, 137, 138, 139,
140, 141, 142, 143, 144, 145, 146, 147, 148, 149,
150, 151, 152, 153, 154, 155, 156, 157, 158, 159,
160, 161, 162, 163, 164, 165, 166, 167, 168, 169,
170, 171, 172, 173, 174, 175, 176, 177, 178, 179,
180, 181, 182
*NSET,NSET=THETA5
1, 4, 5, 8, 9, 10, 27, 28, 29, 30,
31, 32, 33, 34, 35, 36, 37, 38, 39, 40,
41, 59, 60, 61, 62, 63, 64, 65, 66, 67,
68, 69, 70, 71, 72, 73, 89, 90, 91, 92,
93, 94, 95, 96, 97, 98, 99, 100, 101, 102,
186, 187, 188, 189, 190, 191, 192, 193, 194, 195,
196, 197, 198, 199, 200, 201, 202, 203, 204, 205,
206, 207, 208, 209, 210, 211, 212, 213, 214, 215,
216, 217, 218, 219, 220, 221, 222, 223, 224, 225,
226, 227, 228, 229, 230, 231, 232, 233, 234, 235,
236, 237, 238, 239, 240, 241, 242, 243, 244, 245,
246, 247, 248, 249, 250, 251, 252, 253, 254, 255,
256, 257, 258
*NSET,NSET=ZBOT
1, 2, 3, 4, 5, 11, 12, 13, 14, 15,
16, 17, 18, 19, 20, 21, 22, 23, 24, 25,
26, 27, 28, 29, 30, 31, 32, 33, 34, 35,
36, 37, 38, 39, 40, 41, 42, 103, 104, 105,
106, 107, 108, 109
*NSET,NSET=ZTOP
6, 7, 8, 9, 10, 43, 44, 45, 46, 47,
48, 49, 50, 51, 52, 53, 54, 55, 56, 57,
58, 59, 60, 61, 62, 63, 64, 65, 66, 67,
68, 69, 70, 71, 72, 73, 74, 262, 263, 264,
265, 266, 267, 268
*NSET,NSET=SCL_LINE
260
270
273
276
279
282
285
288
184
*SURFACE,NAME=SURF_INNER,TYPE=ELEMENT
151, S6
152, S6
153, S6
154, S6
*MATERIAL,NAME=SA516
*ELASTIC
2.000000e+05, 0.3000
*SOLID SECTION,ELSET=BODY,MATERIAL=SA516
** Reference node for closed-end plane-sections MPC.
*NODE,NSET=ZTOP_REF
290, 0.0, 0.0, 100.0
** Symmetry: theta=0 face -> uy=0; theta=5 face -> normal disp = 0.
*BOUNDARY
THETA0, 2, 2, 0.0
ZBOT, 3, 3, 0.0
** MPC: THETA5 normal-disp = 0; ZTOP plane-sections-remain-plane.
*EQUATION
2
1, 1, -0.08715574, 1, 2,  0.99619470
*EQUATION
2
4, 1, -0.08715574, 4, 2,  0.99619470
*EQUATION
2
5, 1, -0.08715574, 5, 2,  0.99619470
*EQUATION
2
8, 1, -0.08715574, 8, 2,  0.99619470
*EQUATION
2
9, 1, -0.08715574, 9, 2,  0.99619470
*EQUATION
2
10, 1, -0.08715574, 10, 2,  0.99619470
*EQUATION
2
27, 1, -0.08715574, 27, 2,  0.99619470
*EQUATION
2
28, 1, -0.08715574, 28, 2,  0.99619470
*EQUATION
2
29, 1, -0.08715574, 29, 2,  0.99619470
*EQUATION
2
30, 1, -0.08715574, 30, 2,  0.99619470
*EQUATION
2
31, 1, -0.08715574, 31, 2,  0.99619470
*EQUATION
2
32, 1, -0.08715574, 32, 2,  0.99619470
*EQUATION
2
33, 1, -0.08715574, 33, 2,  0.99619470
*EQUATION
2
34, 1, -0.08715574, 34, 2,  0.99619470
*EQUATION
2
35, 1, -0.08715574, 35, 2,  0.99619470
*EQUATION
2
36, 1, -0.08715574, 36, 2,  0.99619470
*EQUATION
2
37, 1, -0.08715574, 37, 2,  0.99619470
*EQUATION
2
38, 1, -0.08715574, 38, 2,  0.99619470
*EQUATION
2
39, 1, -0.08715574, 39, 2,  0.99619470
*EQUATION
2
40, 1, -0.08715574, 40, 2,  0.99619470
*EQUATION
2
41, 1, -0.08715574, 41, 2,  0.99619470
*EQUATION
2
59, 1, -0.08715574, 59, 2,  0.99619470
*EQUATION
2
60, 1, -0.08715574, 60, 2,  0.99619470
*EQUATION
2
61, 1, -0.08715574, 61, 2,  0.99619470
*EQUATION
2
62, 1, -0.08715574, 62, 2,  0.99619470
*EQUATION
2
63, 1, -0.08715574, 63, 2,  0.99619470
*EQUATION
2
64, 1, -0.08715574, 64, 2,  0.99619470
*EQUATION
2
65, 1, -0.08715574, 65, 2,  0.99619470
*EQUATION
2
66, 1, -0.08715574, 66, 2,  0.99619470
*EQUATION
2
67, 1, -0.08715574, 67, 2,  0.99619470
*EQUATION
2
68, 1, -0.08715574, 68, 2,  0.99619470
*EQUATION
2
69, 1, -0.08715574, 69, 2,  0.99619470
*EQUATION
2
70, 1, -0.08715574, 70, 2,  0.99619470
*EQUATION
2
71, 1, -0.08715574, 71, 2,  0.99619470
*EQUATION
2
72, 1, -0.08715574, 72, 2,  0.99619470
*EQUATION
2
73, 1, -0.08715574, 73, 2,  0.99619470
*EQUATION
2
89, 1, -0.08715574, 89, 2,  0.99619470
*EQUATION
2
90, 1, -0.08715574, 90, 2,  0.99619470
*EQUATION
2
91, 1, -0.08715574, 91, 2,  0.99619470
*EQUATION
2
92, 1, -0.08715574, 92, 2,  0.99619470
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*STEP,NLGEOM=NO
*STATIC
** Internal pressure 10.0 MPa on bore + total axial 4363.3231 N on ref node.
*DLOAD
SURF_INNER, P, 10.0
*CLOAD
290, 3, 4.363323e+03
*EL FILE
S
*NODE FILE
U
*END STEP
