*HEADING
FM-04a Phase 31 A heat transfer cross-check
*NODE
1, 0.000000000e+00, 0.000000000e+00, 0.000000000e+00
2, 1.000000000e-02, 0.000000000e+00, 0.000000000e+00
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*ELEMENT, TYPE=C3D8, ELSET=BAR
1, 1, 2, 13, 12, 34, 35, 46, 45
2, 2, 3, 14, 13, 35, 36, 47, 46
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*NSET, NSET=LEFT
1, 12, 23, 34, 45, 56, 67, 78
89
*NSET, NSET=RIGHT
11, 22, 33, 44, 55, 66, 77, 88
99
*NSET, NSET=ALL_NODES
1, 2, 3, 4, 5, 6
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*MATERIAL, NAME=STEEL_HT
*CONDUCTIVITY
5.000000e+01
*SOLID SECTION, ELSET=BAR, MATERIAL=STEEL_HT
*INITIAL CONDITIONS, TYPE=TEMPERATURE
ALL_NODES, 2.931500e+02
*PHYSICAL CONSTANTS, ABSOLUTE ZERO=0.0
*STEP
*HEAT TRANSFER, STEADY STATE
*BOUNDARY
LEFT, 11, 11, 3.731500e+02
RIGHT, 11, 11, 2.731500e+02
*NODE PRINT, NSET=ALL_NODES
NT
*END STEP
