*HEADING
NAFEMS LE10 thick plate pressure - real ccx benchmark solve (meters/Pa).
*NODE,NSET=NALL
       1,  0.000000000e+00,  0.000000000e+00, -3.000000000e-01
       2,  2.000000000e+00,  0.000000000e+00, -3.000000000e-01
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*ELEMENT,TYPE=C3D20,ELSET=BODY
2595, 2, 169, 527, 11, 483, 2808, 6965, 4055,
     188, 1268, 1269, 50, 2904, 10671, 10672, 4250, 488, 2903, 10670, 4251
2596, 483, 2808, 6965, 4055, 484, 2809, 6966, 4056,
     2904, 10671, 10672, 4250, 2906, 10674, 10675, 4252, 489, 2905, 10673, 4253
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*NSET,NSET=XSYM
1, 3, 5, 8, 9, 10
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*NSET,NSET=YSYM
1, 2, 4, 6, 7, 8
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*NSET,NSET=OUTER
4, 5, 7, 9, 90, 91
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*NSET,NSET=ZMID_OUTER
496, 507, 3119, 3124, 3129, 3134
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*SURFACE,NAME=TOP,TYPE=ELEMENT
2600, S2
2606, S2
2612, S2
2618, S2
2624, S2
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7394, S2
*MATERIAL,NAME=STEEL
*ELASTIC
2.100000e+11, 0.3000
*SOLID SECTION,ELSET=BODY,MATERIAL=STEEL
*BOUNDARY
XSYM, 1, 1, 0.0
YSYM, 2, 2, 0.0
OUTER, 1, 1, 0.0
OUTER, 2, 2, 0.0
ZMID_OUTER, 3, 3, 0.0
*STEP
*STATIC
*DLOAD
TOP, P, 1.000000e+06
*EL FILE
S
*NODE FILE
U
*END STEP
