*HEADING
NAFEMS LE11 solid cyl/taper/sphere temperature - real ccx thermal-stress solve (m/Pa/degC).
*NODE,NSET=NALL
       1,  0.000000000e+00,  0.000000000e+00,  0.000000000e+00
       2,  1.000000000e+00,  0.000000000e+00,  0.000000000e+00
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*ELEMENT,TYPE=C3D20,ELSET=BODY
3013, 3, 206, 729, 52, 343, 1652, 7785, 3031,
     213, 834, 835, 67, 1758, 9361, 9362, 3256, 358, 1757, 9360, 3257
3014, 343, 1652, 7785, 3031, 344, 1653, 7786, 3032,
     1758, 9361, 9362, 3256, 1760, 9364, 9365, 3258, 359, 1759, 9363, 3259
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*NSET,NSET=XSYM
1, 10, 11, 12, 13, 14
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*NSET,NSET=YSYM
1, 2, 3, 4, 5, 6
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*NSET,NSET=ZBOT
1, 2, 3, 10, 11, 206
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*NSET,NSET=ZTOP
8, 9, 18, 19, 20, 137
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*MATERIAL,NAME=STEEL
*ELASTIC
2.100000e+11, 0.3000
*EXPANSION,ZERO=0.0
2.300000e-04
*SOLID SECTION,ELSET=BODY,MATERIAL=STEEL
*INITIAL CONDITIONS,TYPE=TEMPERATURE
NALL, 0.0000
*STEP
*STATIC
*BOUNDARY
XSYM, 1, 1, 0.0
YSYM, 2, 2, 0.0
ZBOT, 3, 3, 0.0
ZTOP, 3, 3, 0.0
*TEMPERATURE
1, 0.000000000e+00
2, 1.000000000e+00
3, 1.400000000e+00
4, 1.414213562e+00
5, 1.915411379e+00
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26221, 2.735495129e+00
*EL FILE
S
*NODE FILE
U
*END STEP
