*HEADING
rotating annular disk, centrifugal load (ccx C3D20, SI)
*NODE
2, 0.200000000, 0.000000000, 0.000000000
3, 1.000000000, 0.000000000, 0.000000000
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*ELEMENT,TYPE=C3D20,ELSET=EALL
5395, 2, 11, 783, 342, 771, 7504, 14981, 8117,
     58, 2992, 2993, 390, 7552, 17191, 17192, 8259, 772, 7551, 17190, 8256
5396, 771, 7504, 14981, 8117, 6, 391, 8260, 722,
     7552, 17191, 17192, 8259, 438, 10469, 10470, 770, 773, 7553, 17193, 8258
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*MATERIAL,NAME=STEEL
*ELASTIC
200000000000.0, 0.3
*DENSITY
7850.0
*SOLID SECTION,ELSET=EALL,MATERIAL=STEEL
*BOUNDARY
2, 2, 2
2, 3, 3
3, 2, 2
3, 3, 3
4, 1, 1
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8070, 1, 1
*STEP
*STATIC
*DLOAD
EALL, CENTRIF, 10000.0, 0., 0., 0., 0., 0., 1.
*EL FILE
S
*END STEP
